/PREP7
ANTYPE,STATIC
ET,1,SOLID185
MAT,1
MPTEMP,,,,,,,,
MPTEMP,1,0
MPDATA,EX,1,, 2.00000e+05
MPDATA,PRXY,1,, 3.00000e-01
N,   1,0.0000e+00,0.0000e+00,0.0000e+00
N,   2,0.0000e+00,0.0000e+00,1.2500e+00
N,   3,0.0000e+00,0.0000e+00,2.5000e+00
N,   4,0.0000e+00,0.0000e+00,3.7500e+00
N,   5,0.0000e+00,0.0000e+00,5.0000e+00
N,   6,0.0000e+00,3.3333e+00,0.0000e+00
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N,1785,2.0000e+02,2.0000e+01,5.0000e+00
EN,   1,    1,    2,    7,    6,   36,   37,   42,   41
EN,   2,    2,    3,    8,    7,   37,   38,   43,   42
EN,   3,    3,    4,    9,    8,   38,   39,   44,   43
EN,   4,    4,    5,   10,    9,   39,   40,   45,   44
EN,   5,    6,    7,   12,   11,   41,   42,   47,   46
EN,   6,    7,    8,   13,   12,   42,   43,   48,   47
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EN,1200, 1744, 1745, 1750, 1749, 1779, 1780, 1785, 1784
D,     1,UX,0,,     1,1
D,     1,UY,0,,     1,1
D,     1,UZ,0,,     1,1
D,     2,UX,0,,     2,1
D,     2,UY,0,,     2,1
D,     2,UZ,0,,     2,1
D,     3,UX,0,,     3,1
D,     3,UY,0,,     3,1
D,     3,UZ,0,,     3,1
D,     4,UX,0,,     4,1
D,     4,UY,0,,     4,1
D,     4,UZ,0,,     4,1
D,     5,UX,0,,     5,1
D,     5,UY,0,,     5,1
D,     5,UZ,0,,     5,1
D,     6,UX,0,,     6,1
D,     6,UY,0,,     6,1
D,     6,UZ,0,,     6,1
D,     7,UX,0,,     7,1
D,     7,UY,0,,     7,1
D,     7,UZ,0,,     7,1
D,     8,UX,0,,     8,1
D,     8,UY,0,,     8,1
D,     8,UZ,0,,     8,1
D,     9,UX,0,,     9,1
D,     9,UY,0,,     9,1
D,     9,UZ,0,,     9,1
D,    10,UX,0,,    10,1
D,    10,UY,0,,    10,1
D,    10,UZ,0,,    10,1
D,    11,UX,0,,    11,1
D,    11,UY,0,,    11,1
D,    11,UZ,0,,    11,1
D,    12,UX,0,,    12,1
D,    12,UY,0,,    12,1
D,    12,UZ,0,,    12,1
D,    13,UX,0,,    13,1
D,    13,UY,0,,    13,1
D,    13,UZ,0,,    13,1
D,    14,UX,0,,    14,1
D,    14,UY,0,,    14,1
D,    14,UZ,0,,    14,1
D,    15,UX,0,,    15,1
D,    15,UY,0,,    15,1
D,    15,UZ,0,,    15,1
D,    16,UX,0,,    16,1
D,    16,UY,0,,    16,1
D,    16,UZ,0,,    16,1
D,    17,UX,0,,    17,1
D,    17,UY,0,,    17,1
D,    17,UZ,0,,    17,1
D,    18,UX,0,,    18,1
D,    18,UY,0,,    18,1
D,    18,UZ,0,,    18,1
D,    19,UX,0,,    19,1
D,    19,UY,0,,    19,1
D,    19,UZ,0,,    19,1
D,    20,UX,0,,    20,1
D,    20,UY,0,,    20,1
D,    20,UZ,0,,    20,1
D,    21,UX,0,,    21,1
D,    21,UY,0,,    21,1
D,    21,UZ,0,,    21,1
D,    22,UX,0,,    22,1
D,    22,UY,0,,    22,1
D,    22,UZ,0,,    22,1
D,    23,UX,0,,    23,1
D,    23,UY,0,,    23,1
D,    23,UZ,0,,    23,1
D,    24,UX,0,,    24,1
D,    24,UY,0,,    24,1
D,    24,UZ,0,,    24,1
D,    25,UX,0,,    25,1
D,    25,UY,0,,    25,1
D,    25,UZ,0,,    25,1
D,    26,UX,0,,    26,1
D,    26,UY,0,,    26,1
D,    26,UZ,0,,    26,1
D,    27,UX,0,,    27,1
D,    27,UY,0,,    27,1
D,    27,UZ,0,,    27,1
D,    28,UX,0,,    28,1
D,    28,UY,0,,    28,1
D,    28,UZ,0,,    28,1
D,    29,UX,0,,    29,1
D,    29,UY,0,,    29,1
D,    29,UZ,0,,    29,1
D,    30,UX,0,,    30,1
D,    30,UY,0,,    30,1
D,    30,UZ,0,,    30,1
D,    31,UX,0,,    31,1
D,    31,UY,0,,    31,1
D,    31,UZ,0,,    31,1
D,    32,UX,0,,    32,1
D,    32,UY,0,,    32,1
D,    32,UZ,0,,    32,1
D,    33,UX,0,,    33,1
D,    33,UY,0,,    33,1
D,    33,UZ,0,,    33,1
D,    34,UX,0,,    34,1
D,    34,UY,0,,    34,1
D,    34,UZ,0,,    34,1
D,    35,UX,0,,    35,1
D,    35,UY,0,,    35,1
D,    35,UZ,0,,    35,1
F,  1785,FZ,-4.1667e+01
F,  1785,FY,-1.6667e+02
F,  1784,FZ,-8.3333e+01
F,  1784,FY,-3.3333e+02
F,  1783,FZ,-8.3333e+01
F,  1783,FY,-3.3333e+02
F,  1782,FZ,-8.3333e+01
F,  1782,FY,-3.3333e+02
F,  1781,FZ,-4.1667e+01
F,  1781,FY,-1.6667e+02
F,  1780,FZ,-8.3333e+01
F,  1780,FY,-3.3333e+02
F,  1779,FZ,-1.6667e+02
F,  1779,FY,-6.6667e+02
F,  1778,FZ,-1.6667e+02
F,  1778,FY,-6.6667e+02
F,  1777,FZ,-1.6667e+02
F,  1777,FY,-6.6667e+02
F,  1776,FZ,-8.3333e+01
F,  1776,FY,-3.3333e+02
F,  1775,FZ,-8.3333e+01
F,  1775,FY,-3.3333e+02
F,  1774,FZ,-1.6667e+02
F,  1774,FY,-6.6667e+02
F,  1773,FZ,-1.6667e+02
F,  1773,FY,-6.6667e+02
F,  1772,FZ,-1.6667e+02
F,  1772,FY,-6.6667e+02
F,  1771,FZ,-8.3333e+01
F,  1771,FY,-3.3333e+02
F,  1770,FZ,-8.3333e+01
F,  1770,FY,-3.3333e+02
F,  1769,FZ,-1.6667e+02
F,  1769,FY,-6.6667e+02
F,  1768,FZ,-1.6667e+02
F,  1768,FY,-6.6667e+02
F,  1767,FZ,-1.6667e+02
F,  1767,FY,-6.6667e+02
F,  1766,FZ,-8.3333e+01
F,  1766,FY,-3.3333e+02
F,  1765,FZ,-8.3333e+01
F,  1765,FY,-3.3333e+02
F,  1764,FZ,-1.6667e+02
F,  1764,FY,-6.6667e+02
F,  1763,FZ,-1.6667e+02
F,  1763,FY,-6.6667e+02
F,  1762,FZ,-1.6667e+02
F,  1762,FY,-6.6667e+02
F,  1761,FZ,-8.3333e+01
F,  1761,FY,-3.3333e+02
F,  1760,FZ,-8.3333e+01
F,  1760,FY,-3.3333e+02
F,  1759,FZ,-1.6667e+02
F,  1759,FY,-6.6667e+02
F,  1758,FZ,-1.6667e+02
F,  1758,FY,-6.6667e+02
F,  1757,FZ,-1.6667e+02
F,  1757,FY,-6.6667e+02
F,  1756,FZ,-8.3333e+01
F,  1756,FY,-3.3333e+02
F,  1755,FZ,-4.1667e+01
F,  1755,FY,-1.6667e+02
F,  1754,FZ,-8.3333e+01
F,  1754,FY,-3.3333e+02
F,  1753,FZ,-8.3333e+01
F,  1753,FY,-3.3333e+02
F,  1752,FZ,-8.3333e+01
F,  1752,FY,-3.3333e+02
F,  1751,FZ,-4.1667e+01
F,  1751,FY,-1.6667e+02
FINISH
/SOL
/REP,FAST
ANTYPE,0
NLGEOM,1
NSUBST,500,500,500
OUTRES,ERASE
OUTRES,ALL,ALL
TIME,1
SOLVE
