/PREP7
ET,1,BEAM188
MPTEMP,,,,,,,,
MPTEMP,1,0
MPDATA,EX,1,, 1.00000e+03
MPDATA,PRXY,1,,0.3
SECTYPE,   1, BEAM, RECT, , 0
SECOFFSET, CENT
SECDATA, 6.00000e+00, 9.00000e+00,0,0,0,0,0,0,0,0,0,0
N,   1,0.0000e+00,0.0000e+00
N,   2,2.0000e+00,0.0000e+00
N,   3,4.0000e+00,0.0000e+00
N,   4,6.0000e+00,0.0000e+00
N,   5,8.0000e+00,0.0000e+00
N,   6,1.0000e+01,0.0000e+00
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N,  52,0.0000e+00,2.0000e+01
EN,   1,    1,    2,   52
EN,   2,    2,    3,   52
EN,   3,    3,    4,   52
EN,   4,    4,    5,   52
EN,   5,    5,    6,   52
EN,   6,    6,    7,   52
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EN,  50,   50,   51,   52
D,     1,UX,0,,     1,1
D,     1,UY,0,,     1,1
D,     1,UZ,0,,     1,1
D,     1,ROTX,0,,     1,1
D,     1,ROTY,0,,     1,1
D,     1,ROTZ,0,,     1,1
D,     1,UZ,0,,     1,1
D,     1,ROTX,0,,     1,1
D,     1,ROTY,0,,     1,1
F,    51,FY,5.0000e+01
F,    51,FZ,5.0000e+01
F,    51,MX,-3.5000e+03
LSWRITE,1
FINISH
/SOLU
NSUBST,100,100,100
OUTRES,ERASE
OUTRES,ALL,ALL
TIME,1
NLGEOM,1
/SOLVE
solve
FINISH
